<?xml version="1.0" encoding="UTF-8"?>
<networkml xmlns="http://morphml.org/networkml/schema"
    xmlns:meta="http://morphml.org/metadata/schema"
    xmlns:xsi="http://www.w3.org/2001/XMLSchema-instance"
    xsi:schemaLocation="http://morphml.org/networkml/schema  NeuroML.xsd"
    lengthUnits="micron">

    <meta:notes>A NetworkML file generated from a simple Python interface</meta:notes>

    <populations>
        <population name="SampleCellGroup" cell_type="SampleCell">
            <instances size="40">
                <instance id="0" node_id="3">
                    <location x="0.0" y="0" z="100.0"/>
                </instance>
                <instance id="1" node_id="1">
                    <location x="49.4807918509" y="4" z="96.8912421711"/>
                </instance>
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            </instances>
        </population>
    </populations>
    <projections units="Physiological Units">
        <projection name="NetConn_SampleCellGroup_SampleCellGroup" source="SampleCellGroup" target="SampleCellGroup">
            <synapse_props synapse_type="DoubExpSyn" internal_delay="5" weight="1" threshold="-20"/>
            <connections>
                <connection id="0" pre_cell_id="0" post_cell_id="1"/>
                <connection id="1" pre_cell_id="1" post_cell_id="2"/>
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            </connections>
        </projection>
    </projections>
</networkml>
