<?xml version="1.0" encoding="UTF-8"?>
<channelml xmlns="http://morphml.org/channelml/schema" xmlns:xsi="http://www.w3.org/2001/XMLSchema-instance" xmlns:meta="http://morphml.org/metadata/schema" xsi:schemaLocation="http://morphml.org/neuroml/schema../../Schemata/v1.7.3/Level2/ChannelML_v1.7.3.xsd" units="Physiological Units">

<meta:notes>

ChannelML description of a channel KConductance generated with project: TestNetworkML saved with neuroConstruct v1.2.3 on: 16:35:20, 20-Feb-09

</meta:notes>

<channel_type name="KConductance" density="yes">
<status value="stable">
<meta:comment>Equations adapted from paper for modern convention of external potential being zero</meta:comment>
<meta:contributor>
<meta:name>Padraig Gleeson</meta:name>
</meta:contributor>
</status>
<meta:notes>Simple example of K conductance in squid giant axon. Based on channel from Hodgkin and Huxley 1952</meta:notes>
<meta:publication>
<meta:fullTitle>A. L. Hodgkin and A. F. Huxley, A quantitative description of membrane current and its application
            to conduction and excitation in nerve, J. Physiol., vol. 117, pp. 500-544, 1952.</meta:fullTitle>
<meta:pubmedRef>http://www.ncbi.nlm.nih.gov/entrez/query.fcgi?cmd=Retrieve&amp;db=pubmed&amp;dopt=Abstract&amp;list_uids=12991237</meta:pubmedRef>
</meta:publication>
<meta:neuronDBref>
<meta:modelName>K channels</meta:modelName>
<meta:uri>http://senselab.med.yale.edu/senselab/NeuronDB/channelGene2.htm#table3</meta:uri>
</meta:neuronDBref>
<current_voltage_relation>
<ohmic ion="k">
<conductance default_gmax="36">
<gate power="4">
<state name="n" fraction="1"></state>
</gate>
</conductance>
</ohmic>
</current_voltage_relation>
<hh_gate state="n">
<transition>
<voltage_gate>
<alpha>
<parameterised_hh type="linoid">
<parameter name="A" value="0.1"></parameter>
<parameter name="k" value="0.1"></parameter>
<parameter name="d" value="-55"></parameter>
</parameterised_hh>
</alpha>
<beta>
<parameterised_hh type="exponential">
<parameter name="A" value="0.125"></parameter>
<parameter name="k" value="-0.0125"></parameter>
<parameter name="d" value="-65"></parameter>
</parameterised_hh>
</beta>
</voltage_gate>
</transition>
</hh_gate>
<impl_prefs>
<table_settings max_v="100" min_v="-100" table_divisions="400"></table_settings>
</impl_prefs>
</channel_type>
</channelml>
