<?xml version="1.0" encoding="ISO-8859-1"?>
<neuroml xmlns="http://www.neuroml.org/schema/neuroml2" xmlns:xsi="http://www.w3.org/2001/XMLSchema-instance" xsi:schemaLocation="http://www.neuroml.org/schema/neuroml2 https://raw.github.com/NeuroML/NeuroML2/development/Schemas/NeuroML2/NeuroML_v2beta4.xsd" id="GABA_syn_inh">

    <notes>ChannelML file describing a single synaptic mechanism</notes>

    <expTwoSynapse id="GABA_syn_inh" tauRise="0.003s" tauDecay="0.008s" gbase="0S" erev="-0.080V">

        <notes>NOTE: zero conductance as per ACnet2-main.g</notes>
</expTwoSynapse>

</neuroml>
