<?xml version="1.0" encoding="UTF-8"?>
<neuroml xmlns="http://www.neuroml.org/schema/neuroml2" xmlns:xsi="http://www.w3.org/2001/XMLSchema-instance" xsi:schemaLocation="http://www.neuroml.org/schema/neuroml2  https://raw.github.com/NeuroML/NeuroML2/development/Schemas/NeuroML2/NeuroML_v2beta3.xsd" id="network_ACnet2">

    <notes>

Network structure (NeuroML 2beta3) for project: ACnet2 saved with neuroConstruct v1.7.1 on: 16:49:49, 03-Jun-14

Cell Group: pyrs48x48 contains 2304 cells
Cell Group: baskets24x24 contains 576 cells

    </notes>

    <include href="bask.cell.nml"/>
    <include href="Ca_conc.nml"/>
    <include href="Ca_pyr.channel.nml"/>
    <include href="Kahp_pyr.channel.nml"/>
    <include href="Kdr_bask.channel.nml"/>
    <include href="Kdr_pyr.channel.nml"/>
    <include href="LeakConductance_bask.channel.nml"/>
    <include href="LeakConductance_pyr.channel.nml"/>
    <include href="Na_bask.channel.nml"/>
    <include href="Na_pyr.channel.nml"/>
    <include href="pyr_4_sym.cell.nml"/>
    <network id="network_ACnet2" type="networkWithTemperature" temperature="6.3 degC">

        <population id="pyrs48x48" component="pyr_4_sym" type="populationList" size="2304">
            <instance id="0">
                <location x="0.0" y="0.0" z="0.0"/>
            </instance>
            <instance id="1">
                <location x="50.0" y="0.0" z="0.0"/>
            </instance>
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        </population>

        <population id="baskets24x24" component="bask" type="populationList" size="576">
            <instance id="0">
                <location x="0.0" y="200.0" z="0.0"/>
            </instance>
            <instance id="1">
                <location x="100.0" y="200.0" z="0.0"/>
            </instance>
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        </population>

            <!--There are no synaptic connections present in the network-->

            <!--There are no electrical inputs present in the network-->

    </network>

</neuroml>
